// SBML level 2 version 3

model Motivational_example_cbngl_fixedparameterswoParam()

  // Compartments:
  compartment EC = 2528.246;
  compartment PM in EC = 944.234;  // 2-D
  compartment CP in PM = 377.11;
  compartment NM in CP = 344.6185;  // 2-D
  compartment NU in NM = 194.3616;
  compartment EM in CP = 139.2952;  // 2-D
  compartment EN in EM = 2.223953;

  // Species:
  species EC_L_d_r in EC = 2673.7996; EC_L_d_r is "@EC::L(d,r)";
  species PM_R_l_tf_Y in PM = 17769.364; PM_R_l_tf_Y is "@PM::R(l,tf~Y)";
  species CP_TF_d_Y_dna_im_r in CP = 67.049098; CP_TF_d_Y_dna_im_r is "@CP::TF(d~Y,dna,im,r)";
  species NU_DNA_p1_p2 in NU = 1.633256; NU_DNA_p1_p2 is "@NU::DNA(p1,p2)";
  species CP_Im_cargo_fg in CP = 187.31541; CP_Im_cargo_fg is "@CP::Im(cargo,fg)";
  species NM_NP_fg in NM = 6268.4094; NM_NP_fg is "@NM::NP(fg)";
  species $CP_Sink in CP = 0; CP_Sink is "@CP::Sink()";
  species PM_L_d_r_1_EC_R_l_1_tf_Y in PM = 1772.8761; PM_L_d_r_1_EC_R_l_1_tf_Y is "@PM::L(d,r!1)@EC.R(l!1,tf~Y)";
  species EC_L_d_1_r_L_d_1_r in EC = 141.45003; EC_L_d_1_r_L_d_1_r is "@EC::L(d!1,r).L(d!1,r)";
  species NM_Im_cargo_fg_1_CP_NP_fg_1 in NM = 311.49092; NM_Im_cargo_fg_1_CP_NP_fg_1 is "@NM::Im(cargo,fg!1)@CP.NP(fg!1)";
  species S11 in PM = 162.75402; S11 is "@PM::L(d!1,r!2)@EC.L(d!1,r)@EC.R(l!2,tf~Y)";
  species S12 in PM = 81.204514; S12 is "@PM::L(d!1,r!2)@EC.L(d!1,r!3)@EC.R(l!2,tf~Y).R(l!3,tf~Y)";
  species NM_Im_cargo_fg_1_NU_NP_fg_1 in NM = 311.85479; NM_Im_cargo_fg_1_NU_NP_fg_1 is "@NM::Im(cargo,fg!1)@NU.NP(fg!1)";
  species S14 in EM = 59.716777; S14 is "@EM::L(d!1,r!2)@EN.L(d!1,r!3)@EN.R(l!2,tf~Y).R(l!3,tf~Y)";
  species S15 in PM = 85.204396; S15 is "@PM::L(d!1,r!2)@EC.L(d!1,r!3)@EC.R(l!2,tf~Y).R(l!3,tf~pY)";
  species NU_Im_cargo_fg in NU = 96.703276; NU_Im_cargo_fg is "@NU::Im(cargo,fg)";
  species S17 in EM = 427.04351; S17 is "@EM::L(d!1,r!2)@EN.L(d!1,r)@EN.R(l!2,tf~Y)";
  species EM_R_l_tf_Y in EM = 444.8238; EM_R_l_tf_Y is "@EM::R(l,tf~Y)";
  species S19 in PM = 65.457659; S19 is "@PM::L(d!1,r!2)@EC.L(d!1,r)@EC.R(l!2,tf~pY)";
  species PM_R_l_tf_pY in PM = 2857.3652; PM_R_l_tf_pY is "@PM::R(l,tf~pY)";
  species EM_L_d_r_1_EN_R_l_1_tf_Y in EM = 435.84163; EM_L_d_r_1_EN_R_l_1_tf_Y is "@EM::L(d,r!1)@EN.R(l!1,tf~Y)";
  species PM_L_d_r_1_EC_R_l_1_tf_pY in PM = 401.4259; PM_L_d_r_1_EC_R_l_1_tf_pY is "@PM::L(d,r!1)@EC.R(l!1,tf~pY)";
  species S23 in EM = 187.91584; S23 is "@EM::L(d!1,r!2)@EN.L(d!1,r!3)@EN.R(l!2,tf~Y).R(l!3,tf~pY)";
  species S24 in PM = 31.135264; S24 is "@PM::L(d!1,r!2)@EC.L(d!1,r!3)@EC.R(l!2,tf~pY).R(l!3,tf~pY)";
  species S25 in PM = 8.9113456; S25 is "@PM::L(d!1,r!2)@EC.L(d!1,r!3)@EC.R(l!2,tf~Y).R(l!3,tf~pY!4).TF(d~Y,dna,im,r!4)@CP";
  species EN_L_d_1_r_L_d_1_r in EN = 10.678931; EN_L_d_1_r_L_d_1_r is "@EN::L(d!1,r).L(d!1,r)";
  species EN_L_d_r in EN = 21.783487; EN_L_d_r is "@EN::L(d,r)";
  species S28 in EM = 575.28938; S28 is "@EM::L(d!1,r!2)@EN.L(d!1,r)@EN.R(l!2,tf~pY)";
  species EM_R_l_tf_pY in EM = 597.80512; EM_R_l_tf_pY is "@EM::R(l,tf~pY)";
  species S30 in PM = 8.7644482; S30 is "@PM::L(d!1,r!2)@EC.L(d!1,r)@EC.R(l!2,tf~pY!3).TF(d~Y,dna,im,r!3)@CP";
  species S31 in PM = 643.22982; S31 is "@PM::R(l,tf~pY!1).TF(d~Y,dna,im,r!1)@CP";
  species EM_L_d_r_1_EN_R_l_1_tf_pY in EM = 586.43862; EM_L_d_r_1_EN_R_l_1_tf_pY is "@EM::L(d,r!1)@EN.R(l!1,tf~pY)";
  species S33 in PM = 73.501509; S33 is "@PM::L(d,r!1)@EC.R(l!1,tf~pY!2).TF(d~Y,dna,im,r!2)@CP";
  species S34 in EM = 177.8234; S34 is "@EM::L(d!1,r!2)@EN.L(d!1,r!3)@EN.R(l!2,tf~pY).R(l!3,tf~pY)";
  species S35 in EM = 19.679435; S35 is "@EM::L(d!1,r!2)@EN.L(d!1,r!3)@EN.R(l!2,tf~Y).R(l!3,tf~pY!4).TF(d~Y,dna,im,r!4)@CP";
  species S36 in PM = 5.7506429; S36 is "@PM::L(d!1,r!2)@EC.L(d!1,r!3)@EC.R(l!3,tf~pY!4).R(l!2,tf~pY).TF(d~Y,dna,im,r!4)@CP";
  species S37 in PM = 0.17853965; S37 is "@PM::L(d!1,r!2)@EC.L(d!1,r!3)@EC.R(l!2,tf~pY!4).R(l!3,tf~pY!5).TF(d~Y,dna,im,r!4)@CP.TF(d~Y,dna,im,r!5)@CP";
  species S38 in EM = 69.607826; S38 is "@EM::L(d!1,r!2)@EN.L(d!1,r)@EN.R(l!2,tf~pY!3).TF(d~Y,dna,im,r!3)@CP";
  species S39 in EM = 72.440557; S39 is "@EM::R(l,tf~pY!1).TF(d~Y,dna,im,r!1)@CP";
  species S40 in EM = 71.009906; S40 is "@EM::L(d,r!1)@EN.R(l!1,tf~pY!2).TF(d~Y,dna,im,r!2)@CP";
  species S41 in EM = 37.189001; S41 is "@EM::L(d!1,r!2)@EN.L(d!1,r!3)@EN.R(l!3,tf~pY!4).R(l!2,tf~pY).TF(d~Y,dna,im,r!4)@CP";
  species S42 in EM = 1.1868766; S42 is "@EM::L(d!1,r!2)@EN.L(d!1,r!3)@EN.R(l!2,tf~pY!4).R(l!3,tf~pY!5).TF(d~Y,dna,im,r!4)@CP.TF(d~Y,dna,im,r!5)@CP";
  species S43 in PM = 0.027235471; S43 is "@PM::L(d!1,r!2)@EC.L(d!1,r!3)@EC.R(l!2,tf~pY!4).R(l!3,tf~pY!5).TF(d~Y,dna,im,r!4)@CP.TF(d~pY,dna,im,r!5)@CP";
  species S44 in PM = 0.037522631; S44 is "@PM::L(d!1,r!2)@EC.L(d!1,r)@EC.R(l!2,tf~pY!3).TF(d~pY,dna,im,r!3)@CP";
  species S45 in PM = 1.575948; S45 is "@PM::R(l,tf~pY!1).TF(d~pY,dna,im,r!1)@CP";
  species S46 in PM = 0.22310265; S46 is "@PM::L(d,r!1)@EC.R(l!1,tf~pY!2).TF(d~pY,dna,im,r!2)@CP";
  species S47 in EM = 0.18625468; S47 is "@EM::L(d!1,r!2)@EN.L(d!1,r!3)@EN.R(l!2,tf~pY!4).R(l!3,tf~pY!5).TF(d~Y,dna,im,r!4)@CP.TF(d~pY,dna,im,r!5)@CP";
  species S48 in PM = 0.032509624; S48 is "@PM::L(d!1,r!2)@EC.L(d!1,r!3)@EC.R(l!3,tf~pY!4).R(l!2,tf~pY).TF(d~pY,dna,im,r!4)@CP";
  species CP_TF_d_pY_dna_im_r in CP = 20.772995; CP_TF_d_pY_dna_im_r is "@CP::TF(d~pY,dna,im,r)";
  species S50 in PM = 0.001166718; S50 is "@PM::L(d!1,r!2)@EC.L(d!1,r!3)@EC.R(l!2,tf~pY!4).R(l!3,tf~pY!5).TF(d~pY,dna,im,r!4)@CP.TF(d~pY,dna,im,r!5)@CP";
  species S51 in PM = 0.041213572; S51 is "@PM::L(d!1,r!2)@EC.L(d!1,r!3)@EC.R(l!2,tf~Y).R(l!3,tf~pY!4).TF(d~pY,dna,im,r!4)@CP";
  species S52 in EM = 0.33386666; S52 is "@EM::L(d!1,r!2)@EN.L(d!1,r)@EN.R(l!2,tf~pY!3).TF(d~pY,dna,im,r!3)@CP";
  species S53 in EM = 0.34646129; S53 is "@EM::R(l,tf~pY!1).TF(d~pY,dna,im,r!1)@CP";
  species S54 in EM = 0.34010398; S54 is "@EM::L(d,r!1)@EN.R(l!1,tf~pY!2).TF(d~pY,dna,im,r!2)@CP";
  species S55 in EM = 0.2027929; S55 is "@EM::L(d!1,r!2)@EN.L(d!1,r!3)@EN.R(l!3,tf~pY!4).R(l!2,tf~pY).TF(d~pY,dna,im,r!4)@CP";
  species S56 in EM = 0.0080978028; S56 is "@EM::L(d!1,r!2)@EN.L(d!1,r!3)@EN.R(l!2,tf~pY!4).R(l!3,tf~pY!5).TF(d~pY,dna,im,r!4)@CP.TF(d~pY,dna,im,r!5)@CP";
  species S57 in EM = 0.099724687; S57 is "@EM::L(d!1,r!2)@EN.L(d!1,r!3)@EN.R(l!2,tf~Y).R(l!3,tf~pY!4).TF(d~pY,dna,im,r!4)@CP";
  species S58 in CP = 2.8445623; S58 is "@CP::TF(d~pY!1,dna,im,r).TF(d~pY!1,dna,im,r)";
  species S59 in CP = 0.31716619; S59 is "@CP::Im(cargo!1!2,fg).TF(d~pY!3,dna,im!1,r).TF(d~pY!3,dna,im!2,r)";
  species S60 in NM = 0.4171285; S60 is "@NM::Im(cargo!1!2,fg!3)@CP.NP(fg!3).TF(d~pY!4,dna,im!1,r)@CP.TF(d~pY!4,dna,im!2,r)@CP";
  species S61 in NM = 0.11378168; S61 is "@NM::Im(cargo!1!2,fg!3)@NU.NP(fg!3).TF(d~pY!4,dna,im!1,r)@NU.TF(d~pY!4,dna,im!2,r)@NU";
  species S62 in NU = 5.3470652; S62 is "@NU::TF(d~pY!1,dna,im,r).TF(d~pY!1,dna,im,r)";
  species S63 in NU = 0.028665893; S63 is "@NU::Im(cargo!1!2,fg).TF(d~pY!3,dna,im!1,r).TF(d~pY!3,dna,im!2,r)";
  species NU_TF_d_pY_dna_im_r in NU = 12.315797; NU_TF_d_pY_dna_im_r is "@NU::TF(d~pY,dna,im,r)";
  species S65 in NU = 0.35222176; S65 is "@NU::DNA(p1!1!2,p2).TF(d~pY!3,dna!1,im,r).TF(d~pY!3,dna!2,im,r)";
  species NU_mRNA1 in NU = 0.17495252; NU_mRNA1 is "@NU::mRNA1()";
  species CP_mRNA1 in CP = 0.17005445; CP_mRNA1 is "@CP::mRNA1()";
  species CP_P1_dna_im in CP = 0.68650194; CP_P1_dna_im is "@CP::P1(dna,im)";
  species CP_Im_cargo_1_fg_P1_dna_im_1 in CP = 0.055853489; CP_Im_cargo_1_fg_P1_dna_im_1 is "@CP::Im(cargo!1,fg).P1(dna,im!1)";
  species S70 in NM = 0.071967113; S70 is "@NM::Im(cargo!1,fg!2)@CP.NP(fg!2).P1(dna,im!1)@CP";
  species S71 in NM = 0.011442284; S71 is "@NM::Im(cargo!1,fg!2)@NU.NP(fg!2).P1(dna,im!1)@NU";
  species NU_P1_dna_im in NU = 0.37242795; NU_P1_dna_im is "@NU::P1(dna,im)";
  species NU_Im_cargo_1_fg_P1_dna_im_1 in NU = 0.0022411747; NU_Im_cargo_1_fg_P1_dna_im_1 is "@NU::Im(cargo!1,fg).P1(dna,im!1)";
  species NU_DNA_p1_p2_1_P1_dna_1_im in NU = 0.011946047; NU_DNA_p1_p2_1_P1_dna_1_im is "@NU::DNA(p1,p2!1).P1(dna!1,im)";
  species S75 in NU = 0.0025762391; S75 is "@NU::DNA(p1!1!2,p2!3).P1(dna!3,im).TF(d~pY!4,dna!1,im,r).TF(d~pY!4,dna!2,im,r)";
  species NU_mRNA2 in NU = 0.0070377204; NU_mRNA2 is "@NU::mRNA2()";
  species CP_mRNA2 in CP = 0.0065980903; CP_mRNA2 is "@CP::mRNA2()";
  species CP_P2 in CP = 0.034891487; CP_P2 is "@CP::P2()";

  // Parameters:
  vol_CP = 573.69562;
  sa_PM = 944.23401;
  vol_NU = 194.36163;
  sa_NM = 344.61847;
  vol_EN = 2.223953;
  sa_EM = 139.2952;
  vol_EC = 3101.9412;
  sa_EC = 2002.7205;
  nEndo = 80;
  eff_width = 1;
  nAvo = 6.022e23;
  cL0 = 6.8e-9;
  cR0 = 5e-8;
  cTF0 = 5e-9;
  cNP = 20;
  cIm = 4e-9;
  DNA0 = 2;
  kp_LR = 0.1;
  km_LR = 1;
  kp_LL = 0.1;
  km_LL = 1;
  k_R_endo = 1;
  k_recycle = 0.1;
  k_R_transphos = 1;
  k_R_dephos = 0.1;
  kp_R_TF = 0.1;
  km_R_TF = 0.1;
  kp_R_TFp = 0.1;
  km_R_TFp = 10;
  k_TF_transphos = 1;
  k_TF_dephos = 0.1;
  kp_TF_TF = 1;
  km_TF_TF = 0.1;
  kp_TF_p1 = 1;
  km_TF_p1 = 0.1;
  k_transcribe = 1;
  k_translate = 1;
  k_mRNA_to_CP = 1;
  k_mRNA_deg = 1;
  k_P_deg = 0.1;
  k_Im_bind_CP = 0.1;
  k_Im_unbind_CP = 0.1;
  k_Im_bind_NU = 0.1;
  k_Im_unbind_NU = 10;
  k_Im_enters_NP = 0.1;
  k_Im_exits_NP = 1;
  k_Im_cross_NP = 1;
  kp_P1_p2 = 1;
  km_P1_p2 = 0.1;
  vol_PM = sa_PM*eff_width;
  vol_NM = sa_NM*eff_width;
  vol_EM = sa_EM*eff_width;
  L0 = cL0*nAvo*(vol_EC - vol_CP)*1e-15;
  R0 = cR0*nAvo*vol_PM*1e-15;
  TF0 = cTF0*nAvo*(vol_CP - vol_NU - vol_EN)*1e-15;
  Im0 = cIm*nAvo*(vol_CP - vol_NU - vol_EN)*1e-15;
  NP0 = cNP*vol_NM;

  // Assignment rules:
  Tot_L := EC_L_d_r + PM_L_d_r_1_EC_R_l_1_tf_Y + 2*EC_L_d_1_r_L_d_1_r + 2*S11 + 2*S12 + 2*S14 + 2*S15 + 2*S17 + 2*S19 + EM_L_d_r_1_EN_R_l_1_tf_Y + PM_L_d_r_1_EC_R_l_1_tf_pY + 2*S23 + 2*S24 + 2*S25 + 2*EN_L_d_1_r_L_d_1_r + EN_L_d_r + 2*S28 + 2*S30 + EM_L_d_r_1_EN_R_l_1_tf_pY + S33 + 2*S34 + 2*S35 + 2*S36 + 2*S37 + 2*S38 + S40 + 2*S41 + 2*S42 + 2*S43 + 2*S44 + S46 + 2*S47 + 2*S48 + 2*S50 + 2*S51 + 2*S52 + S54 + 2*S55 + 2*S56 + 2*S57;
  Tot_R := PM_R_l_tf_Y + PM_L_d_r_1_EC_R_l_1_tf_Y + S11 + 2*S12 + 2*S14 + 2*S15 + S17 + EM_R_l_tf_Y + S19 + PM_R_l_tf_pY + EM_L_d_r_1_EN_R_l_1_tf_Y + PM_L_d_r_1_EC_R_l_1_tf_pY + 2*S23 + 2*S24 + 2*S25 + S28 + EM_R_l_tf_pY + S30 + S31 + EM_L_d_r_1_EN_R_l_1_tf_pY + S33 + 2*S34 + 2*S35 + 2*S36 + 2*S37 + S38 + S39 + S40 + 2*S41 + 2*S42 + 2*S43 + S44 + S45 + S46 + 2*S47 + 2*S48 + 2*S50 + 2*S51 + S52 + S53 + S54 + 2*S55 + 2*S56 + 2*S57;
  Tot_TF := CP_TF_d_Y_dna_im_r + S25 + S30 + S31 + S33 + S35 + S36 + 2*S37 + S38 + S39 + S40 + S41 + 2*S42 + 2*S43 + S44 + S45 + S46 + 2*S47 + S48 + CP_TF_d_pY_dna_im_r + 2*S50 + S51 + S52 + S53 + S54 + S55 + 2*S56 + S57 + 2*S58 + 2*S59 + 2*S60 + 2*S61 + 2*S62 + 2*S63 + NU_TF_d_pY_dna_im_r + 2*S65 + 2*S75;
  Tot_DNA := NU_DNA_p1_p2 + S65 + NU_DNA_p1_p2_1_P1_dna_1_im + S75;
  Tot_mRNA1 := NU_mRNA1 + CP_mRNA1;
  Tot_mRNA2 := NU_mRNA2 + CP_mRNA2;
  Tot_P1 := CP_P1_dna_im + CP_Im_cargo_1_fg_P1_dna_im_1 + S70 + S71 + NU_P1_dna_im + NU_Im_cargo_1_fg_P1_dna_im_1 + NU_DNA_p1_p2_1_P1_dna_1_im + S75;
  Tot_P2 := 0 + CP_P2;
  Tot_NP := NM_NP_fg + NM_Im_cargo_fg_1_CP_NP_fg_1 + NM_Im_cargo_fg_1_NU_NP_fg_1 + S60 + S61 + S70 + S71;
  Tot_Im := CP_Im_cargo_fg + NM_Im_cargo_fg_1_CP_NP_fg_1 + NM_Im_cargo_fg_1_NU_NP_fg_1 + NU_Im_cargo_fg + S59 + S60 + S61 + S63 + CP_Im_cargo_1_fg_P1_dna_im_1 + S70 + S71 + NU_Im_cargo_1_fg_P1_dna_im_1;
  L_Dimers_EC := 0 + EC_L_d_1_r_L_d_1_r;
  L_Dimers_PM := S11 + S12 + S15 + S19 + S24 + S25 + S30 + S36 + S37 + S43 + S44 + S48 + S50 + S51;
  L_Dimers_EN := 0 + EN_L_d_1_r_L_d_1_r;
  L_Dimers_EM := S14 + S17 + S23 + S28 + S34 + S35 + S38 + S41 + S42 + S47 + S52 + S55 + S56 + S57;
  L_Bound_PM := PM_L_d_r_1_EC_R_l_1_tf_Y + 2*S11 + 2*S12 + 2*S15 + 2*S19 + PM_L_d_r_1_EC_R_l_1_tf_pY + 2*S24 + 2*S25 + 2*S30 + S33 + 2*S36 + 2*S37 + 2*S43 + 2*S44 + S46 + 2*S48 + 2*S50 + 2*S51;
  L_Bound_EM := 2*S14 + 2*S17 + EM_L_d_r_1_EN_R_l_1_tf_Y + 2*S23 + 2*S28 + EM_L_d_r_1_EN_R_l_1_tf_pY + 2*S34 + 2*S35 + 2*S38 + S40 + 2*S41 + 2*S42 + 2*S47 + 2*S52 + S54 + 2*S55 + 2*S56 + 2*S57;
  R_Dimers_PM := S12 + S15 + S24 + S25 + S36 + S37 + S43 + S48 + S50 + S51;
  R_Dimers_EM := S14 + S23 + S34 + S35 + S41 + S42 + S47 + S55 + S56 + S57;
  Catalytic_R := S15 + S19 + PM_R_l_tf_pY + PM_L_d_r_1_EC_R_l_1_tf_pY + S23 + 2*S24 + S25 + S28 + EM_R_l_tf_pY + S30 + S31 + EM_L_d_r_1_EN_R_l_1_tf_pY + S33 + 2*S34 + S35 + 2*S36 + 2*S37 + S38 + S39 + S40 + 2*S41 + 2*S42 + 2*S43 + S44 + S45 + S46 + 2*S47 + 2*S48 + 2*S50 + S51 + S52 + S53 + S54 + 2*S55 + 2*S56 + S57;
  Catalytic_TF := S25 + S30 + S31 + S33 + S35 + S36 + 2*S37 + S38 + S39 + S40 + S41 + 2*S42 + 2*S43 + S44 + S45 + S46 + 2*S47 + S48 + 2*S50 + S51 + S52 + S53 + S54 + S55 + 2*S56 + S57;
  Phos_TF := S43 + S44 + S45 + S46 + S47 + S48 + CP_TF_d_pY_dna_im_r + 2*S50 + S51 + S52 + S53 + S54 + S55 + 2*S56 + S57 + 2*S58 + 2*S59 + 2*S60 + 2*S61 + 2*S62 + 2*S63 + NU_TF_d_pY_dna_im_r + 2*S65 + 2*S75;
  Phos_TF_CP := S43 + S44 + S45 + S46 + S47 + S48 + CP_TF_d_pY_dna_im_r + 2*S50 + S51 + S52 + S53 + S54 + S55 + 2*S56 + S57 + 2*S58 + 2*S59 + 2*S60;
  TF_Dimer_CP := S58 + S59 + S60;
  TF_Dimer_NU := S61 + S62 + S63 + S65 + S75;
  Bound_prom1 := S65 + S75;
  Bound_prom2 := NU_DNA_p1_p2_1_P1_dna_1_im + S75;
  P1_NU := S71 + NU_P1_dna_im + NU_Im_cargo_1_fg_P1_dna_im_1 + NU_DNA_p1_p2_1_P1_dna_1_im + S75;
  P1_CP := CP_P1_dna_im + CP_Im_cargo_1_fg_P1_dna_im_1 + S70;
  Im_NU := NM_Im_cargo_fg_1_NU_NP_fg_1 + NU_Im_cargo_fg + S61 + S63 + S71 + NU_Im_cargo_1_fg_P1_dna_im_1;
  Im_CP := CP_Im_cargo_fg + NM_Im_cargo_fg_1_CP_NP_fg_1 + S59 + S60 + CP_Im_cargo_1_fg_P1_dna_im_1 + S70;
  Im_Cargo_NP := S60 + S61 + S70 + S71;
  P1_NU_free := 0 + NU_P1_dna_im;
  P1_NU_dna := NU_DNA_p1_p2_1_P1_dna_1_im + S75;
  CountSink := 0 + CP_Sink;

  // Reactions:
  R1: EC_L_d_r + PM_R_l_tf_Y => PM_L_d_r_1_EC_R_l_1_tf_Y; kp_LR*EC_L_d_r*PM_R_l_tf_Y;
  R2: EC_L_d_r + EC_L_d_r => EC_L_d_1_r_L_d_1_r; 0.5*kp_LL*EC_L_d_r*EC_L_d_r;
  R3: CP_Im_cargo_fg + NM_NP_fg => NM_Im_cargo_fg_1_CP_NP_fg_1; k_Im_enters_NP*CP_Im_cargo_fg*NM_NP_fg;
  R4: PM_R_l_tf_Y + EC_L_d_1_r_L_d_1_r => S11; 2*kp_LR*PM_R_l_tf_Y*EC_L_d_1_r_L_d_1_r;
  R5: PM_L_d_r_1_EC_R_l_1_tf_Y => EC_L_d_r + PM_R_l_tf_Y; km_LR*PM_L_d_r_1_EC_R_l_1_tf_Y;
  R6: EC_L_d_r + PM_L_d_r_1_EC_R_l_1_tf_Y => S11; kp_LL*EC_L_d_r*PM_L_d_r_1_EC_R_l_1_tf_Y;
  R7: PM_L_d_r_1_EC_R_l_1_tf_Y + PM_L_d_r_1_EC_R_l_1_tf_Y => S12; 0.5*kp_LL*PM_L_d_r_1_EC_R_l_1_tf_Y*PM_L_d_r_1_EC_R_l_1_tf_Y;
  R8: EC_L_d_1_r_L_d_1_r => EC_L_d_r + EC_L_d_r; km_LL*EC_L_d_1_r_L_d_1_r;
  R9: NM_Im_cargo_fg_1_CP_NP_fg_1 => CP_Im_cargo_fg + NM_NP_fg; k_Im_exits_NP*NM_Im_cargo_fg_1_CP_NP_fg_1;
  R10: NM_Im_cargo_fg_1_CP_NP_fg_1 => NM_Im_cargo_fg_1_NU_NP_fg_1; k_Im_cross_NP*NM_Im_cargo_fg_1_CP_NP_fg_1;
  R11: PM_R_l_tf_Y + S11 => S12; kp_LR*PM_R_l_tf_Y*S11;
  R12: S11 => PM_R_l_tf_Y + EC_L_d_1_r_L_d_1_r; km_LR*S11;
  R13: S12 => PM_R_l_tf_Y + S11; 2*km_LR*S12;
  R14: S11 => EC_L_d_r + PM_L_d_r_1_EC_R_l_1_tf_Y; km_LL*S11;
  R15: S12 => PM_L_d_r_1_EC_R_l_1_tf_Y + PM_L_d_r_1_EC_R_l_1_tf_Y; km_LL*S12;
  R16: S12 => S14; k_R_endo*S12;
  R17: S12 => S15; 2*k_R_transphos*S12;
  R18: NM_Im_cargo_fg_1_NU_NP_fg_1 => NM_NP_fg + NU_Im_cargo_fg; k_Im_exits_NP*NM_Im_cargo_fg_1_NU_NP_fg_1;
  R19: NM_Im_cargo_fg_1_NU_NP_fg_1 => NM_Im_cargo_fg_1_CP_NP_fg_1; k_Im_cross_NP*NM_Im_cargo_fg_1_NU_NP_fg_1;
  R20: S14 => S17 + EM_R_l_tf_Y; 2*km_LR*S14;
  R21: S15 => PM_R_l_tf_Y + S19; km_LR*S15;
  R22: S15 => S11 + PM_R_l_tf_pY; km_LR*S15;
  R23: S14 => EM_L_d_r_1_EN_R_l_1_tf_Y + EM_L_d_r_1_EN_R_l_1_tf_Y; km_LL*S14;
  R24: S15 => PM_L_d_r_1_EC_R_l_1_tf_Y + PM_L_d_r_1_EC_R_l_1_tf_pY; km_LL*S15;
  R25: S15 => S23; k_R_endo*S15;
  R26: S14 => S12; k_recycle*S14;
  R27: S14 => S23; 2*k_R_transphos*S14;
  R28: S15 => S24; k_R_transphos*S15;
  R29: S15 => S12; k_R_dephos*S15;
  R30: CP_TF_d_Y_dna_im_r + S15 => S25; kp_R_TF*CP_TF_d_Y_dna_im_r*S15;
  R31: NM_NP_fg + NU_Im_cargo_fg => NM_Im_cargo_fg_1_NU_NP_fg_1; k_Im_enters_NP*NM_NP_fg*NU_Im_cargo_fg;
  R32: EC_L_d_r + PM_R_l_tf_pY => PM_L_d_r_1_EC_R_l_1_tf_pY; kp_LR*EC_L_d_r*PM_R_l_tf_pY;
  R33: EC_L_d_1_r_L_d_1_r + PM_R_l_tf_pY => S19; 2*kp_LR*EC_L_d_1_r_L_d_1_r*PM_R_l_tf_pY;
  R34: S11 + PM_R_l_tf_pY => S15; kp_LR*S11*PM_R_l_tf_pY;
  R35: S17 + EM_R_l_tf_Y => S14; kp_LR*S17*EM_R_l_tf_Y;
  R36: PM_R_l_tf_Y + S19 => S15; kp_LR*PM_R_l_tf_Y*S19;
  R37: S19 + PM_R_l_tf_pY => S24; kp_LR*S19*PM_R_l_tf_pY;
  R38: S17 => EM_R_l_tf_Y + EN_L_d_1_r_L_d_1_r; km_LR*S17;
  R39: S19 => EC_L_d_1_r_L_d_1_r + PM_R_l_tf_pY; km_LR*S19;
  R40: EM_L_d_r_1_EN_R_l_1_tf_Y => EM_R_l_tf_Y + EN_L_d_r; km_LR*EM_L_d_r_1_EN_R_l_1_tf_Y;
  R41: PM_L_d_r_1_EC_R_l_1_tf_pY => EC_L_d_r + PM_R_l_tf_pY; km_LR*PM_L_d_r_1_EC_R_l_1_tf_pY;
  R42: S23 => EM_R_l_tf_Y + S28; km_LR*S23;
  R43: S23 => S17 + EM_R_l_tf_pY; km_LR*S23;
  R44: S24 => S19 + PM_R_l_tf_pY; 2*km_LR*S24;
  R45: S25 => PM_R_l_tf_Y + S30; km_LR*S25;
  R46: S25 => S11 + S31; km_LR*S25;
  R47: EC_L_d_r + PM_L_d_r_1_EC_R_l_1_tf_pY => S19; kp_LL*EC_L_d_r*PM_L_d_r_1_EC_R_l_1_tf_pY;
  R48: PM_L_d_r_1_EC_R_l_1_tf_Y + PM_L_d_r_1_EC_R_l_1_tf_pY => S15; kp_LL*PM_L_d_r_1_EC_R_l_1_tf_Y*PM_L_d_r_1_EC_R_l_1_tf_pY;
  R49: EM_L_d_r_1_EN_R_l_1_tf_Y + EM_L_d_r_1_EN_R_l_1_tf_Y => S14; 0.5*kp_LL*EM_L_d_r_1_EN_R_l_1_tf_Y*EM_L_d_r_1_EN_R_l_1_tf_Y;
  R50: PM_L_d_r_1_EC_R_l_1_tf_pY + PM_L_d_r_1_EC_R_l_1_tf_pY => S24; 0.5*kp_LL*PM_L_d_r_1_EC_R_l_1_tf_pY*PM_L_d_r_1_EC_R_l_1_tf_pY;
  R51: S17 => EM_L_d_r_1_EN_R_l_1_tf_Y + EN_L_d_r; km_LL*S17;
  R52: S19 => EC_L_d_r + PM_L_d_r_1_EC_R_l_1_tf_pY; km_LL*S19;
  R53: S23 => EM_L_d_r_1_EN_R_l_1_tf_Y + EM_L_d_r_1_EN_R_l_1_tf_pY; km_LL*S23;
  R54: S24 => PM_L_d_r_1_EC_R_l_1_tf_pY + PM_L_d_r_1_EC_R_l_1_tf_pY; km_LL*S24;
  R55: S25 => PM_L_d_r_1_EC_R_l_1_tf_Y + S33; km_LL*S25;
  R56: S24 => S34; k_R_endo*S24;
  R57: S25 => S35; k_R_endo*S25;
  R58: S17 => S11; k_recycle*S17;
  R59: EM_R_l_tf_Y => PM_R_l_tf_Y; k_recycle*EM_R_l_tf_Y;
  R60: EM_L_d_r_1_EN_R_l_1_tf_Y => PM_L_d_r_1_EC_R_l_1_tf_Y; k_recycle*EM_L_d_r_1_EN_R_l_1_tf_Y;
  R61: S23 => S15; k_recycle*S23;
  R62: S23 => S34; k_R_transphos*S23;
  R63: S25 => S36; k_R_transphos*S25;
  R64: S19 => S11; k_R_dephos*S19;
  R65: PM_R_l_tf_pY => PM_R_l_tf_Y; k_R_dephos*PM_R_l_tf_pY;
  R66: PM_L_d_r_1_EC_R_l_1_tf_pY => PM_L_d_r_1_EC_R_l_1_tf_Y; k_R_dephos*PM_L_d_r_1_EC_R_l_1_tf_pY;
  R67: S23 => S14; k_R_dephos*S23;
  R68: S24 => S15; 2*k_R_dephos*S24;
  R69: CP_TF_d_Y_dna_im_r + S19 => S30; kp_R_TF*CP_TF_d_Y_dna_im_r*S19;
  R70: CP_TF_d_Y_dna_im_r + PM_R_l_tf_pY => S31; kp_R_TF*CP_TF_d_Y_dna_im_r*PM_R_l_tf_pY;
  R71: CP_TF_d_Y_dna_im_r + PM_L_d_r_1_EC_R_l_1_tf_pY => S33; kp_R_TF*CP_TF_d_Y_dna_im_r*PM_L_d_r_1_EC_R_l_1_tf_pY;
  R72: CP_TF_d_Y_dna_im_r + S23 => S35; kp_R_TF*CP_TF_d_Y_dna_im_r*S23;
  R73: CP_TF_d_Y_dna_im_r + S24 => S36; 2*kp_R_TF*CP_TF_d_Y_dna_im_r*S24;
  R74: S25 => CP_TF_d_Y_dna_im_r + S15; km_R_TF*S25;
  R75: EC_L_d_r + S31 => S33; kp_LR*EC_L_d_r*S31;
  R76: EC_L_d_1_r_L_d_1_r + S31 => S30; 2*kp_LR*EC_L_d_1_r_L_d_1_r*S31;
  R77: S11 + S31 => S25; kp_LR*S11*S31;
  R78: S17 + EM_R_l_tf_pY => S23; kp_LR*S17*EM_R_l_tf_pY;
  R79: S19 + S31 => S36; kp_LR*S19*S31;
  R80: EM_R_l_tf_Y + EN_L_d_1_r_L_d_1_r => S17; 2*kp_LR*EM_R_l_tf_Y*EN_L_d_1_r_L_d_1_r;
  R81: EN_L_d_1_r_L_d_1_r + EM_R_l_tf_pY => S28; 2*kp_LR*EN_L_d_1_r_L_d_1_r*EM_R_l_tf_pY;
  R82: EM_R_l_tf_Y + EN_L_d_r => EM_L_d_r_1_EN_R_l_1_tf_Y; kp_LR*EM_R_l_tf_Y*EN_L_d_r;
  R83: EN_L_d_r + EM_R_l_tf_pY => EM_L_d_r_1_EN_R_l_1_tf_pY; kp_LR*EN_L_d_r*EM_R_l_tf_pY;
  R84: EM_R_l_tf_Y + S28 => S23; kp_LR*EM_R_l_tf_Y*S28;
  R85: S28 + EM_R_l_tf_pY => S34; kp_LR*S28*EM_R_l_tf_pY;
  R86: PM_R_l_tf_Y + S30 => S25; kp_LR*PM_R_l_tf_Y*S30;
  R87: PM_R_l_tf_pY + S30 => S36; kp_LR*PM_R_l_tf_pY*S30;
  R88: S30 + S31 => S37; kp_LR*S30*S31;
  R89: S28 => EN_L_d_1_r_L_d_1_r + EM_R_l_tf_pY; km_LR*S28;
  R90: S30 => EC_L_d_1_r_L_d_1_r + S31; km_LR*S30;
  R91: EM_L_d_r_1_EN_R_l_1_tf_pY => EN_L_d_r + EM_R_l_tf_pY; km_LR*EM_L_d_r_1_EN_R_l_1_tf_pY;
  R92: S33 => EC_L_d_r + S31; km_LR*S33;
  R93: S34 => S28 + EM_R_l_tf_pY; 2*km_LR*S34;
  R94: S35 => EM_R_l_tf_Y + S38; km_LR*S35;
  R95: S35 => S17 + S39; km_LR*S35;
  R96: S36 => PM_R_l_tf_pY + S30; km_LR*S36;
  R97: S36 => S19 + S31; km_LR*S36;
  R98: EC_L_d_r + S33 => S30; kp_LL*EC_L_d_r*S33;
  R99: PM_L_d_r_1_EC_R_l_1_tf_Y + S33 => S25; kp_LL*PM_L_d_r_1_EC_R_l_1_tf_Y*S33;
  R100: EM_L_d_r_1_EN_R_l_1_tf_Y + EN_L_d_r => S17; kp_LL*EM_L_d_r_1_EN_R_l_1_tf_Y*EN_L_d_r;
  R101: EM_L_d_r_1_EN_R_l_1_tf_Y + EM_L_d_r_1_EN_R_l_1_tf_pY => S23; kp_LL*EM_L_d_r_1_EN_R_l_1_tf_Y*EM_L_d_r_1_EN_R_l_1_tf_pY;
  R102: PM_L_d_r_1_EC_R_l_1_tf_pY + S33 => S36; kp_LL*PM_L_d_r_1_EC_R_l_1_tf_pY*S33;
  R103: EN_L_d_r + EN_L_d_r => EN_L_d_1_r_L_d_1_r; 0.5*kp_LL*EN_L_d_r*EN_L_d_r;
  R104: EN_L_d_r + EM_L_d_r_1_EN_R_l_1_tf_pY => S28; kp_LL*EN_L_d_r*EM_L_d_r_1_EN_R_l_1_tf_pY;
  R105: EM_L_d_r_1_EN_R_l_1_tf_pY + EM_L_d_r_1_EN_R_l_1_tf_pY => S34; 0.5*kp_LL*EM_L_d_r_1_EN_R_l_1_tf_pY*EM_L_d_r_1_EN_R_l_1_tf_pY;
  R106: S33 + S33 => S37; 0.5*kp_LL*S33*S33;
  R107: EN_L_d_1_r_L_d_1_r => EN_L_d_r + EN_L_d_r; km_LL*EN_L_d_1_r_L_d_1_r;
  R108: S28 => EN_L_d_r + EM_L_d_r_1_EN_R_l_1_tf_pY; km_LL*S28;
  R109: S30 => EC_L_d_r + S33; km_LL*S30;
  R110: S34 => EM_L_d_r_1_EN_R_l_1_tf_pY + EM_L_d_r_1_EN_R_l_1_tf_pY; km_LL*S34;
  R111: S35 => EM_L_d_r_1_EN_R_l_1_tf_Y + S40; km_LL*S35;
  R112: S36 => PM_L_d_r_1_EC_R_l_1_tf_pY + S33; km_LL*S36;
  R113: S36 => S41; k_R_endo*S36;
  R114: S28 => S19; k_recycle*S28;
  R115: EM_R_l_tf_pY => PM_R_l_tf_pY; k_recycle*EM_R_l_tf_pY;
  R116: EM_L_d_r_1_EN_R_l_1_tf_pY => PM_L_d_r_1_EC_R_l_1_tf_pY; k_recycle*EM_L_d_r_1_EN_R_l_1_tf_pY;
  R117: S34 => S24; k_recycle*S34;
  R118: S35 => S25; k_recycle*S35;
  R119: EN_L_d_1_r_L_d_1_r => EC_L_d_1_r_L_d_1_r; k_recycle*EN_L_d_1_r_L_d_1_r;
  R120: EN_L_d_r => EC_L_d_r; k_recycle*EN_L_d_r;
  R121: S35 => S41; k_R_transphos*S35;
  R122: S28 => S17; k_R_dephos*S28;
  R123: EM_R_l_tf_pY => EM_R_l_tf_Y; k_R_dephos*EM_R_l_tf_pY;
  R124: EM_L_d_r_1_EN_R_l_1_tf_pY => EM_L_d_r_1_EN_R_l_1_tf_Y; k_R_dephos*EM_L_d_r_1_EN_R_l_1_tf_pY;
  R125: S34 => S23; 2*k_R_dephos*S34;
  R126: S36 => S25; k_R_dephos*S36;
  R127: CP_TF_d_Y_dna_im_r + S28 => S38; kp_R_TF*CP_TF_d_Y_dna_im_r*S28;
  R128: CP_TF_d_Y_dna_im_r + EM_R_l_tf_pY => S39; kp_R_TF*CP_TF_d_Y_dna_im_r*EM_R_l_tf_pY;
  R129: CP_TF_d_Y_dna_im_r + EM_L_d_r_1_EN_R_l_1_tf_pY => S40; kp_R_TF*CP_TF_d_Y_dna_im_r*EM_L_d_r_1_EN_R_l_1_tf_pY;
  R130: CP_TF_d_Y_dna_im_r + S34 => S41; 2*kp_R_TF*CP_TF_d_Y_dna_im_r*S34;
  R131: CP_TF_d_Y_dna_im_r + S36 => S37; kp_R_TF*CP_TF_d_Y_dna_im_r*S36;
  R132: S30 => CP_TF_d_Y_dna_im_r + S19; km_R_TF*S30;
  R133: S31 => CP_TF_d_Y_dna_im_r + PM_R_l_tf_pY; km_R_TF*S31;
  R134: S33 => CP_TF_d_Y_dna_im_r + PM_L_d_r_1_EC_R_l_1_tf_pY; km_R_TF*S33;
  R135: S35 => CP_TF_d_Y_dna_im_r + S23; km_R_TF*S35;
  R136: S36 => CP_TF_d_Y_dna_im_r + S24; km_R_TF*S36;
  R137: S17 + S39 => S35; kp_LR*S17*S39;
  R138: EN_L_d_1_r_L_d_1_r + S39 => S38; 2*kp_LR*EN_L_d_1_r_L_d_1_r*S39;
  R139: EN_L_d_r + S39 => S40; kp_LR*EN_L_d_r*S39;
  R140: S28 + S39 => S41; kp_LR*S28*S39;
  R141: EM_R_l_tf_Y + S38 => S35; kp_LR*EM_R_l_tf_Y*S38;
  R142: EM_R_l_tf_pY + S38 => S41; kp_LR*EM_R_l_tf_pY*S38;
  R143: S38 + S39 => S42; kp_LR*S38*S39;
  R144: S37 => S30 + S31; 2*km_LR*S37;
  R145: S38 => EN_L_d_1_r_L_d_1_r + S39; km_LR*S38;
  R146: S40 => EN_L_d_r + S39; km_LR*S40;
  R147: S41 => EM_R_l_tf_pY + S38; km_LR*S41;
  R148: S41 => S28 + S39; km_LR*S41;
  R149: EM_L_d_r_1_EN_R_l_1_tf_Y + S40 => S35; kp_LL*EM_L_d_r_1_EN_R_l_1_tf_Y*S40;
  R150: EN_L_d_r + S40 => S38; kp_LL*EN_L_d_r*S40;
  R151: EM_L_d_r_1_EN_R_l_1_tf_pY + S40 => S41; kp_LL*EM_L_d_r_1_EN_R_l_1_tf_pY*S40;
  R152: S40 + S40 => S42; 0.5*kp_LL*S40*S40;
  R153: S37 => S33 + S33; km_LL*S37;
  R154: S38 => EN_L_d_r + S40; km_LL*S38;
  R155: S41 => EM_L_d_r_1_EN_R_l_1_tf_pY + S40; km_LL*S41;
  R156: S37 => S42; k_R_endo*S37;
  R157: S38 => S30; k_recycle*S38;
  R158: S39 => S31; k_recycle*S39;
  R159: S40 => S33; k_recycle*S40;
  R160: S41 => S36; k_recycle*S41;
  R161: S41 => S35; k_R_dephos*S41;
  R162: CP_TF_d_Y_dna_im_r + S41 => S42; kp_R_TF*CP_TF_d_Y_dna_im_r*S41;
  R163: S37 => CP_TF_d_Y_dna_im_r + S36; 2*km_R_TF*S37;
  R164: S38 => CP_TF_d_Y_dna_im_r + S28; km_R_TF*S38;
  R165: S39 => CP_TF_d_Y_dna_im_r + EM_R_l_tf_pY; km_R_TF*S39;
  R166: S40 => CP_TF_d_Y_dna_im_r + EM_L_d_r_1_EN_R_l_1_tf_pY; km_R_TF*S40;
  R167: S41 => CP_TF_d_Y_dna_im_r + S34; km_R_TF*S41;
  R168: S37 => S43; 2*k_TF_transphos*S37;
  R169: S42 => S38 + S39; 2*km_LR*S42;
  R170: S43 => S31 + S44; km_LR*S43;
  R171: S43 => S30 + S45; km_LR*S43;
  R172: S42 => S40 + S40; km_LL*S42;
  R173: S43 => S33 + S46; km_LL*S43;
  R174: S43 => S47; k_R_endo*S43;
  R175: S42 => S37; k_recycle*S42;
  R176: S42 => CP_TF_d_Y_dna_im_r + S41; 2*km_R_TF*S42;
  R177: S43 => CP_TF_d_Y_dna_im_r + S48; km_R_TF*S43;
  R178: S43 => S36 + CP_TF_d_pY_dna_im_r; km_R_TFp*S43;
  R179: S42 => S47; 2*k_TF_transphos*S42;
  R180: S43 => S50; k_TF_transphos*S43;
  R181: S43 => S37; k_TF_dephos*S43;
  R182: EC_L_d_r + S45 => S46; kp_LR*EC_L_d_r*S45;
  R183: EC_L_d_1_r_L_d_1_r + S45 => S44; 2*kp_LR*EC_L_d_1_r_L_d_1_r*S45;
  R184: S11 + S45 => S51; kp_LR*S11*S45;
  R185: S19 + S45 => S48; kp_LR*S19*S45;
  R186: S30 + S45 => S43; kp_LR*S30*S45;
  R187: PM_R_l_tf_Y + S44 => S51; kp_LR*PM_R_l_tf_Y*S44;
  R188: PM_R_l_tf_pY + S44 => S48; kp_LR*PM_R_l_tf_pY*S44;
  R189: S31 + S44 => S43; kp_LR*S31*S44;
  R190: S44 + S45 => S50; kp_LR*S44*S45;
  R191: S44 => EC_L_d_1_r_L_d_1_r + S45; km_LR*S44;
  R192: S46 => EC_L_d_r + S45; km_LR*S46;
  R193: S47 => S39 + S52; km_LR*S47;
  R194: S47 => S38 + S53; km_LR*S47;
  R195: S48 => PM_R_l_tf_pY + S44; km_LR*S48;
  R196: S48 => S19 + S45; km_LR*S48;
  R197: S50 => S44 + S45; 2*km_LR*S50;
  R198: EC_L_d_r + S46 => S44; kp_LL*EC_L_d_r*S46;
  R199: PM_L_d_r_1_EC_R_l_1_tf_Y + S46 => S51; kp_LL*PM_L_d_r_1_EC_R_l_1_tf_Y*S46;
  R200: PM_L_d_r_1_EC_R_l_1_tf_pY + S46 => S48; kp_LL*PM_L_d_r_1_EC_R_l_1_tf_pY*S46;
  R201: S33 + S46 => S43; kp_LL*S33*S46;
  R202: S46 + S46 => S50; 0.5*kp_LL*S46*S46;
  R203: S44 => EC_L_d_r + S46; km_LL*S44;
  R204: S47 => S40 + S54; km_LL*S47;
  R205: S48 => PM_L_d_r_1_EC_R_l_1_tf_pY + S46; km_LL*S48;
  R206: S50 => S46 + S46; km_LL*S50;
  R207: S48 => S55; k_R_endo*S48;
  R208: S50 => S56; k_R_endo*S50;
  R209: S47 => S43; k_recycle*S47;
  R210: S48 => S51; k_R_dephos*S48;
  R211: CP_TF_d_Y_dna_im_r + S48 => S43; kp_R_TF*CP_TF_d_Y_dna_im_r*S48;
  R212: S47 => CP_TF_d_Y_dna_im_r + S55; km_R_TF*S47;
  R213: S15 + CP_TF_d_pY_dna_im_r => S51; kp_R_TFp*S15*CP_TF_d_pY_dna_im_r;
  R214: S19 + CP_TF_d_pY_dna_im_r => S44; kp_R_TFp*S19*CP_TF_d_pY_dna_im_r;
  R215: PM_R_l_tf_pY + CP_TF_d_pY_dna_im_r => S45; kp_R_TFp*PM_R_l_tf_pY*CP_TF_d_pY_dna_im_r;
  R216: PM_L_d_r_1_EC_R_l_1_tf_pY + CP_TF_d_pY_dna_im_r => S46; kp_R_TFp*PM_L_d_r_1_EC_R_l_1_tf_pY*CP_TF_d_pY_dna_im_r;
  R217: S23 + CP_TF_d_pY_dna_im_r => S57; kp_R_TFp*S23*CP_TF_d_pY_dna_im_r;
  R218: S24 + CP_TF_d_pY_dna_im_r => S48; 2*kp_R_TFp*S24*CP_TF_d_pY_dna_im_r;
  R219: S28 + CP_TF_d_pY_dna_im_r => S52; kp_R_TFp*S28*CP_TF_d_pY_dna_im_r;
  R220: EM_R_l_tf_pY + CP_TF_d_pY_dna_im_r => S53; kp_R_TFp*EM_R_l_tf_pY*CP_TF_d_pY_dna_im_r;
  R221: EM_L_d_r_1_EN_R_l_1_tf_pY + CP_TF_d_pY_dna_im_r => S54; kp_R_TFp*EM_L_d_r_1_EN_R_l_1_tf_pY*CP_TF_d_pY_dna_im_r;
  R222: S34 + CP_TF_d_pY_dna_im_r => S55; 2*kp_R_TFp*S34*CP_TF_d_pY_dna_im_r;
  R223: S36 + CP_TF_d_pY_dna_im_r => S43; kp_R_TFp*S36*CP_TF_d_pY_dna_im_r;
  R224: S41 + CP_TF_d_pY_dna_im_r => S47; kp_R_TFp*S41*CP_TF_d_pY_dna_im_r;
  R225: S48 + CP_TF_d_pY_dna_im_r => S50; kp_R_TFp*S48*CP_TF_d_pY_dna_im_r;
  R226: S44 => S19 + CP_TF_d_pY_dna_im_r; km_R_TFp*S44;
  R227: S45 => PM_R_l_tf_pY + CP_TF_d_pY_dna_im_r; km_R_TFp*S45;
  R228: S46 => PM_L_d_r_1_EC_R_l_1_tf_pY + CP_TF_d_pY_dna_im_r; km_R_TFp*S46;
  R229: S47 => S41 + CP_TF_d_pY_dna_im_r; km_R_TFp*S47;
  R230: S48 => S24 + CP_TF_d_pY_dna_im_r; km_R_TFp*S48;
  R231: S50 => S48 + CP_TF_d_pY_dna_im_r; 2*km_R_TFp*S50;
  R232: S47 => S56; k_TF_transphos*S47;
  R233: S44 => S30; k_TF_dephos*S44;
  R234: S45 => S31; k_TF_dephos*S45;
  R235: S46 => S33; k_TF_dephos*S46;
  R236: S47 => S42; k_TF_dephos*S47;
  R237: S48 => S36; k_TF_dephos*S48;
  R238: CP_TF_d_pY_dna_im_r => CP_TF_d_Y_dna_im_r; k_TF_dephos*CP_TF_d_pY_dna_im_r;
  R239: S50 => S43; 2*k_TF_dephos*S50;
  R240: CP_TF_d_pY_dna_im_r + CP_TF_d_pY_dna_im_r => S58; 0.5*kp_TF_TF*CP_TF_d_pY_dna_im_r*CP_TF_d_pY_dna_im_r;
  R241: S17 + S53 => S57; kp_LR*S17*S53;
  R242: EN_L_d_1_r_L_d_1_r + S53 => S52; 2*kp_LR*EN_L_d_1_r_L_d_1_r*S53;
  R243: EN_L_d_r + S53 => S54; kp_LR*EN_L_d_r*S53;
  R244: S28 + S53 => S55; kp_LR*S28*S53;
  R245: S38 + S53 => S47; kp_LR*S38*S53;
  R246: EM_R_l_tf_Y + S52 => S57; kp_LR*EM_R_l_tf_Y*S52;
  R247: EM_R_l_tf_pY + S52 => S55; kp_LR*EM_R_l_tf_pY*S52;
  R248: S39 + S52 => S47; kp_LR*S39*S52;
  R249: S52 + S53 => S56; kp_LR*S52*S53;
  R250: S51 => PM_R_l_tf_Y + S44; km_LR*S51;
  R251: S51 => S11 + S45; km_LR*S51;
  R252: S52 => EN_L_d_1_r_L_d_1_r + S53; km_LR*S52;
  R253: S54 => EN_L_d_r + S53; km_LR*S54;
  R254: S55 => EM_R_l_tf_pY + S52; km_LR*S55;
  R255: S55 => S28 + S53; km_LR*S55;
  R256: S56 => S52 + S53; 2*km_LR*S56;
  R257: S57 => EM_R_l_tf_Y + S52; km_LR*S57;
  R258: S57 => S17 + S53; km_LR*S57;
  R259: EM_L_d_r_1_EN_R_l_1_tf_Y + S54 => S57; kp_LL*EM_L_d_r_1_EN_R_l_1_tf_Y*S54;
  R260: EN_L_d_r + S54 => S52; kp_LL*EN_L_d_r*S54;
  R261: EM_L_d_r_1_EN_R_l_1_tf_pY + S54 => S55; kp_LL*EM_L_d_r_1_EN_R_l_1_tf_pY*S54;
  R262: S40 + S54 => S47; kp_LL*S40*S54;
  R263: S54 + S54 => S56; 0.5*kp_LL*S54*S54;
  R264: S51 => PM_L_d_r_1_EC_R_l_1_tf_Y + S46; km_LL*S51;
  R265: S52 => EN_L_d_r + S54; km_LL*S52;
  R266: S55 => EM_L_d_r_1_EN_R_l_1_tf_pY + S54; km_LL*S55;
  R267: S56 => S54 + S54; km_LL*S56;
  R268: S57 => EM_L_d_r_1_EN_R_l_1_tf_Y + S54; km_LL*S57;
  R269: S51 => S57; k_R_endo*S51;
  R270: S52 => S44; k_recycle*S52;
  R271: S53 => S45; k_recycle*S53;
  R272: S54 => S46; k_recycle*S54;
  R273: S55 => S48; k_recycle*S55;
  R274: S56 => S50; k_recycle*S56;
  R275: S57 => S51; k_recycle*S57;
  R276: S51 => S48; k_R_transphos*S51;
  R277: S57 => S55; k_R_transphos*S57;
  R278: S55 => S57; k_R_dephos*S55;
  R279: CP_TF_d_Y_dna_im_r + S55 => S47; kp_R_TF*CP_TF_d_Y_dna_im_r*S55;
  R280: CP_TF_d_pY_dna_im_r + S55 => S56; kp_R_TFp*CP_TF_d_pY_dna_im_r*S55;
  R281: S51 => S15 + CP_TF_d_pY_dna_im_r; km_R_TFp*S51;
  R282: S52 => S28 + CP_TF_d_pY_dna_im_r; km_R_TFp*S52;
  R283: S53 => EM_R_l_tf_pY + CP_TF_d_pY_dna_im_r; km_R_TFp*S53;
  R284: S54 => EM_L_d_r_1_EN_R_l_1_tf_pY + CP_TF_d_pY_dna_im_r; km_R_TFp*S54;
  R285: S55 => S34 + CP_TF_d_pY_dna_im_r; km_R_TFp*S55;
  R286: S56 => CP_TF_d_pY_dna_im_r + S55; 2*km_R_TFp*S56;
  R287: S57 => S23 + CP_TF_d_pY_dna_im_r; km_R_TFp*S57;
  R288: S51 => S25; k_TF_dephos*S51;
  R289: S52 => S38; k_TF_dephos*S52;
  R290: S53 => S39; k_TF_dephos*S53;
  R291: S54 => S40; k_TF_dephos*S54;
  R292: S55 => S41; k_TF_dephos*S55;
  R293: S56 => S47; 2*k_TF_dephos*S56;
  R294: S57 => S35; k_TF_dephos*S57;
  R295: S58 => CP_TF_d_pY_dna_im_r + CP_TF_d_pY_dna_im_r; km_TF_TF*S58;
  R296: CP_Im_cargo_fg + S58 => S59; k_Im_bind_CP*CP_Im_cargo_fg*S58;
  R297: NM_Im_cargo_fg_1_CP_NP_fg_1 + S58 => S60; k_Im_bind_CP*NM_Im_cargo_fg_1_CP_NP_fg_1*S58;
  R298: S59 => CP_Im_cargo_fg + S58; k_Im_unbind_CP*S59;
  R299: S60 => NM_Im_cargo_fg_1_CP_NP_fg_1 + S58; k_Im_unbind_CP*S60;
  R300: NM_NP_fg + S59 => S60; k_Im_enters_NP*NM_NP_fg*S59;
  R301: S60 => NM_NP_fg + S59; k_Im_exits_NP*S60;
  R302: S60 => S61; k_Im_cross_NP*S60;
  R303: S61 => NM_Im_cargo_fg_1_NU_NP_fg_1 + S62; k_Im_unbind_NU*S61;
  R304: S61 => NM_NP_fg + S63; k_Im_exits_NP*S61;
  R305: S61 => S60; k_Im_cross_NP*S61;
  R306: S62 => NU_TF_d_pY_dna_im_r + NU_TF_d_pY_dna_im_r; km_TF_TF*S62;
  R307: NU_DNA_p1_p2 + S62 => S65; kp_TF_p1*NU_DNA_p1_p2*S62;
  R308: NM_Im_cargo_fg_1_NU_NP_fg_1 + S62 => S61; k_Im_bind_NU*NM_Im_cargo_fg_1_NU_NP_fg_1*S62;
  R309: NU_Im_cargo_fg + S62 => S63; k_Im_bind_NU*NU_Im_cargo_fg*S62;
  R310: S63 => NU_Im_cargo_fg + S62; k_Im_unbind_NU*S63;
  R311: NM_NP_fg + S63 => S61; k_Im_enters_NP*NM_NP_fg*S63;
  R312: NU_TF_d_pY_dna_im_r + NU_TF_d_pY_dna_im_r => S62; 0.5*kp_TF_TF*NU_TF_d_pY_dna_im_r*NU_TF_d_pY_dna_im_r;
  R313: S65 => NU_DNA_p1_p2 + S62; km_TF_p1*S65;
  R314: S65 => S65 + NU_mRNA1; k_transcribe*S65;
  R315: NU_mRNA1 => CP_mRNA1; k_mRNA_to_CP*NU_mRNA1;
  R316: NU_mRNA1 => $CP_Sink; k_mRNA_deg*NU_mRNA1;
  R317: CP_mRNA1 => CP_mRNA1 + CP_P1_dna_im; k_translate*CP_mRNA1;
  R318: CP_mRNA1 => $CP_Sink; k_mRNA_deg*CP_mRNA1;
  R319: CP_P1_dna_im => $CP_Sink; k_P_deg*CP_P1_dna_im;
  R320: CP_Im_cargo_fg + CP_P1_dna_im => CP_Im_cargo_1_fg_P1_dna_im_1; k_Im_bind_CP*CP_Im_cargo_fg*CP_P1_dna_im;
  R321: NM_Im_cargo_fg_1_CP_NP_fg_1 + CP_P1_dna_im => S70; k_Im_bind_CP*NM_Im_cargo_fg_1_CP_NP_fg_1*CP_P1_dna_im;
  R322: CP_Im_cargo_1_fg_P1_dna_im_1 => CP_Im_cargo_fg + $CP_Sink; k_P_deg*CP_Im_cargo_1_fg_P1_dna_im_1;
  R323: S70 => $CP_Sink + NM_Im_cargo_fg_1_CP_NP_fg_1; k_P_deg*S70;
  R324: CP_Im_cargo_1_fg_P1_dna_im_1 => CP_Im_cargo_fg + CP_P1_dna_im; k_Im_unbind_CP*CP_Im_cargo_1_fg_P1_dna_im_1;
  R325: S70 => NM_Im_cargo_fg_1_CP_NP_fg_1 + CP_P1_dna_im; k_Im_unbind_CP*S70;
  R326: NM_NP_fg + CP_Im_cargo_1_fg_P1_dna_im_1 => S70; k_Im_enters_NP*NM_NP_fg*CP_Im_cargo_1_fg_P1_dna_im_1;
  R327: S70 => NM_NP_fg + CP_Im_cargo_1_fg_P1_dna_im_1; k_Im_exits_NP*S70;
  R328: S70 => S71; k_Im_cross_NP*S70;
  R329: S71 => $CP_Sink + NM_Im_cargo_fg_1_NU_NP_fg_1; k_P_deg*S71;
  R330: S71 => NM_Im_cargo_fg_1_NU_NP_fg_1 + NU_P1_dna_im; k_Im_unbind_NU*S71;
  R331: S71 => NM_NP_fg + NU_Im_cargo_1_fg_P1_dna_im_1; k_Im_exits_NP*S71;
  R332: S71 => S70; k_Im_cross_NP*S71;
  R333: NU_P1_dna_im => $CP_Sink; k_P_deg*NU_P1_dna_im;
  R334: NU_Im_cargo_1_fg_P1_dna_im_1 => $CP_Sink + NU_Im_cargo_fg; k_P_deg*NU_Im_cargo_1_fg_P1_dna_im_1;
  R335: NM_Im_cargo_fg_1_NU_NP_fg_1 + NU_P1_dna_im => S71; k_Im_bind_NU*NM_Im_cargo_fg_1_NU_NP_fg_1*NU_P1_dna_im;
  R336: NU_Im_cargo_fg + NU_P1_dna_im => NU_Im_cargo_1_fg_P1_dna_im_1; k_Im_bind_NU*NU_Im_cargo_fg*NU_P1_dna_im;
  R337: NU_Im_cargo_1_fg_P1_dna_im_1 => NU_Im_cargo_fg + NU_P1_dna_im; k_Im_unbind_NU*NU_Im_cargo_1_fg_P1_dna_im_1;
  R338: NM_NP_fg + NU_Im_cargo_1_fg_P1_dna_im_1 => S71; k_Im_enters_NP*NM_NP_fg*NU_Im_cargo_1_fg_P1_dna_im_1;
  R339: NU_DNA_p1_p2 + NU_P1_dna_im => NU_DNA_p1_p2_1_P1_dna_1_im; kp_P1_p2*NU_DNA_p1_p2*NU_P1_dna_im;
  R340: S65 + NU_P1_dna_im => S75; kp_P1_p2*S65*NU_P1_dna_im;
  R341: S62 + NU_DNA_p1_p2_1_P1_dna_1_im => S75; kp_TF_p1*S62*NU_DNA_p1_p2_1_P1_dna_1_im;
  R342: S75 => S62 + NU_DNA_p1_p2_1_P1_dna_1_im; km_TF_p1*S75;
  R343: S75 => NU_mRNA1 + S75; k_transcribe*S75;
  R344: NU_DNA_p1_p2_1_P1_dna_1_im => NU_DNA_p1_p2_1_P1_dna_1_im + NU_mRNA2; k_transcribe*NU_DNA_p1_p2_1_P1_dna_1_im;
  R345: S75 => S75 + NU_mRNA2; k_transcribe*S75;
  R346: NU_DNA_p1_p2_1_P1_dna_1_im => NU_DNA_p1_p2 + $CP_Sink; k_P_deg*NU_DNA_p1_p2_1_P1_dna_1_im;
  R347: S75 => $CP_Sink + S65; k_P_deg*S75;
  R348: NU_DNA_p1_p2_1_P1_dna_1_im => NU_DNA_p1_p2 + NU_P1_dna_im; km_P1_p2*NU_DNA_p1_p2_1_P1_dna_1_im;
  R349: S75 => S65 + NU_P1_dna_im; km_P1_p2*S75;
  R350: NU_mRNA2 => CP_mRNA2; k_mRNA_to_CP*NU_mRNA2;
  R351: NU_mRNA2 => $CP_Sink; k_mRNA_deg*NU_mRNA2;
  R352: CP_mRNA2 => CP_mRNA2 + CP_P2; k_translate*CP_mRNA2;
  R353: CP_mRNA2 => $CP_Sink; k_mRNA_deg*CP_mRNA2;
  R354: CP_P2 => $CP_Sink; k_P_deg*CP_P2;
end
